New Wiredata.A2/0W4/3AC_OH_PRIMARY Capradius=4.632711111752325 GMR=0.435869 DIAM=1.130000 RAC=0.433071 RDC=0.426509 NormAmps=250.000000 Runits=km radunits=cm gmrunits=cm
New Wiredata.A795V_OH_PRIMARY Capradius=11.32367210923197 GMR=0.999757 DIAM=2.610000 RAC=0.074475 RDC=0.071522 NormAmps=800.000000 Runits=km radunits=cm gmrunits=cm
